// SBML level 3 version 1

function MM(km, Vmax, S)
  Vmax*S/(km + S);
end

function MMWithKcat(km, kcat, S, E)
  kcat*E*S/(km + S);
end

function NonCompetitiveInhibition(km, ki, Vmax, n, I, S)
  Vmax*S/((km + S)*(1 + (I/ki)^n));
end

function NonCompetitiveInhibitionWithKcat(km, ki, kcat, E, n, I, S)
  kcat*E*S/((km + S)*(1 + (I/ki)^n));
end

function NonCompetitiveInhibitionWithKcatAndExtraActivator(km, ki, kcat, E1, E2, n, I, S)
  kcat*E1*E2*S/((km + S)*(1 + (I/ki)^n));
end

function MA1(k, S)
  k*S;
end

function MA2(k, S1, S2)
  k*S1*S2;
end

function MA1Mod(k, S, M)
  k*S*M;
end

function MA2Mod(k, S1, S2, M)
  k*S1*S2*M;
end

function CompetitiveInhibitionWithKcat(km, ki, kcat, E, I, S)
  kcat*E*S/(km + S + km*I/ki);
end

function CompetitiveInhibition(Vmax, km, ki, I, S)
  Vmax*S/(km + S + km*I/ki);
end

function Hill(km, kcat, L, S, h)
  kcat*L*(S/km)^h/1 + (S/km)^h;
end

model AktModelWithMMRateLaws()

  // Compartments:
  compartment Cell = 1;

  // Species:
  species IRS1 in Cell = 10;
  species IRS1a in Cell = 0;
  species IRS1pS636_639 in Cell = 0;
  species Akt in Cell = 10;
  species AktpT308 in Cell = 0;
  species TSC2 in Cell = 0;
  species TSC2pT1462 in Cell = 10;
  species PRAS40 in Cell = 10;
  species PRAS40pT246 in Cell = 0;
  species S6K in Cell = 10;
  species S6KpT389 in Cell = 0;
  species FourEBP1 in Cell = 10;
  species FourEBP1pT37_46 in Cell = 0;
  species PI3K in Cell = 10;
  species pPI3K in Cell = 0;
  species pmTORC1 in Cell = 0;
  species mTORC1cyt in Cell = 10;
  species mTORC1lys in Cell = 0;

  // Parameters:
  Insulin = 1;
  AA = 1;
  _kIRS1Act_km = 1;
  _kIRS1Act_kcat = 1;
  _kIRS1Phos_km = 1;
  _kIRS1Phos_kcat = 1;
  _kIRS1Inact = 1;
  _kIRS1Out2 = 1;
  _kPI3KPhos_km = 1;
  _kPI3KPhos_kcat = 1;
  _kPI3KDephos = 1;
  _kAktPhos_km = 1;
  _kAktPhos_kcat = 1;
  _kAktDephos = 1;
  _kTSC2Phos_km = 1;
  _kTSC2Phos_kcat = 1;
  _kTSC2Dephos = 1;
  _kmTORC1cytToLys = 1;
  _kmTORC1LysToCyt = 1;
  _kmTORC1Phos_km = 1;
  _kmTORC1Phos_kcat = 1;
  _kmTORC1Dephos = 1;
  _kPras40Phos_km = 1;
  _kPras40Phos_kcat = 1;
  _kPras40Dephos = 1;
  _kFourEBP1Phos_km = 1;
  _kFourEBP1Phos_kcat = 1;
  _kFourEBP1Dephos = 1;
  _kS6KPhos_km = 1;
  _kS6KPhos_kcat = 1;
  _kS6KDephos = 1;
  _kIRS1In = 1;
  _kIRS1Out = 1;
  _kAktIn = 1;
  _kAktOut = 1;
  _kTSCIn = 1;
  _kTSCOut = 1;
  _kPras40In = 1;
  _kPras40Out = 1;
  _kFourEBP1In = 1;
  _kFourEBP1Out = 1;
  _kS6KIn = 1;
  _kS6KOut = 1;
  _kIRS1ActBasal = 0.1;
  _kmTORC1cytToLysBasal = 0.1;

  // Reactions:
  R1In: => IRS1; Cell*_kIRS1In;
  R1Out: IRS1 => ; Cell*_kIRS1Out*IRS1;
  R1Out2: IRS1pS636_639 => ; Cell*_kIRS1Out2*IRS1pS636_639;
  R1Basal: IRS1 => IRS1a; Cell*_kIRS1ActBasal*IRS1;
  R1f1: IRS1 => IRS1a; Cell*MMWithKcat(_kIRS1Act_km, _kIRS1Act_kcat, IRS1, Insulin);
  R1b: IRS1a => IRS1; Cell*_kIRS1Inact*IRS1a;
  R1f2: IRS1a => IRS1pS636_639; Cell*MMWithKcat(_kIRS1Phos_km, _kIRS1Phos_kcat, IRS1a, S6KpT389);  // modifiers: S6KpT389
  R3f: PI3K => pPI3K; Cell*MMWithKcat(_kPI3KPhos_km, _kPI3KPhos_kcat, PI3K, IRS1a);  // modifiers: IRS1a
  R3b: pPI3K => PI3K; Cell*_kPI3KDephos*pPI3K;
  R4f: Akt => AktpT308; Cell*MMWithKcat(_kAktPhos_km, _kAktPhos_kcat, Akt, pPI3K);  // modifiers: pPI3K
  R4In: => Akt; Cell*_kAktIn;
  R4Out: Akt => ; Cell*_kAktOut*Akt;
  R4b: AktpT308 => Akt; Cell*_kAktDephos*pPI3K*AktpT308;  // modifiers: pPI3K
  R5f: TSC2 => TSC2pT1462; Cell*MMWithKcat(_kTSC2Phos_km, _kTSC2Phos_kcat, TSC2, AktpT308);  // modifiers: AktpT308
  R5b: TSC2pT1462 => TSC2; Cell*_kTSC2Dephos*TSC2pT1462;
  R5In: => TSC2; Cell*_kTSCIn;
  R5Out: TSC2 => ; Cell*_kTSCOut*TSC2;
  R6f: mTORC1cyt => mTORC1lys; Cell*_kmTORC1cytToLys*mTORC1cyt*AA;
  R6Basal: mTORC1cyt => mTORC1lys; Cell*_kmTORC1cytToLysBasal*mTORC1cyt;
  R6b: mTORC1lys => mTORC1cyt; Cell*_kmTORC1LysToCyt*mTORC1lys;
  R7f: mTORC1lys => pmTORC1; Cell*MMWithKcat(_kmTORC1Phos_km, _kmTORC1Phos_kcat, mTORC1lys, TSC2);  // modifiers: TSC2
  R7b: pmTORC1 => mTORC1lys; Cell*_kmTORC1Dephos*pmTORC1;
  R8In: => PRAS40; Cell*_kPras40In;
  R8Out: PRAS40 => ; Cell*_kPras40Out*PRAS40;
  R8f: PRAS40 => PRAS40pT246; Cell*MMWithKcat(_kPras40Phos_km, _kPras40Phos_kcat, PRAS40, AktpT308);  // modifiers: AktpT308
  R8b: PRAS40pT246 => PRAS40; Cell*_kPras40Dephos*PRAS40pT246;
  R9In: => FourEBP1; Cell*_kFourEBP1In;
  R9Out: FourEBP1 => ; Cell*_kFourEBP1Out*FourEBP1;
  R9f: FourEBP1 => FourEBP1pT37_46; Cell*MMWithKcat(_kFourEBP1Phos_km, _kFourEBP1Phos_kcat, FourEBP1, pmTORC1);  // modifiers: pmTORC1
  R9b: FourEBP1pT37_46 => FourEBP1; Cell*_kFourEBP1Dephos*FourEBP1pT37_46;
  R10In: S6K => ; Cell*_kS6KOut*S6K;
  R10f: S6K => S6KpT389; Cell*MMWithKcat(_kS6KPhos_km, _kS6KPhos_kcat, S6K, pmTORC1);  // modifiers: pmTORC1
  R10b: S6KpT389 => S6K; Cell*_kS6KDephos*S6KpT389;
end
